t := 0.1 .. 100
μ := 0.5
σ := 0.1
f(t) := 1/(σ*t*sqrt(2*π))*e^(-1/2*(ln(t - μ)/σ)^2)
F(t) := integral(f(t), t = 0 .. t)
m_t := e^(μ + σ^2/2)
D_t := e^(2 μ + σ^2)*(e^(σ^2) - 1)
t = [
    0.1; 1.1; 2.1; 3.1; 4.1; 5.1; 6.1; 7.1; 8.1; 9.1
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]
# [plot: f(t) vs t]
