t_1 := 20
t_2 := 25
t_3 := 35
m_1 := 3
m_2 := 2
m_3 := 2
N := 8
n := (m_1 + m_2 + m_3)
N_T := (N - n)
N_T = 1
ch := m_1/N + m_2/(N - m_1) + m_3/(N - (m_1 + m_2))
ch = 1.44167
zn := t_1 + t_2 + t_3
zn = 80
C := ch/zn
C = 0.0180208
λ := C*(N - n)
λ = 0.0180208
t := t_1
R(t) := e^(C*t)
